// COMSOL Multiphysics 5.2.0.220 model "validation_model_high_n_particles.mph"
// Cylinder oled 1spheres
// Outline of the model tree

Parameters
  wl = 550[nm]  // vacuum wavelength
  f = c_const/wl  // frequency
  wlay = 4200[nm]
  dpml = wl * 0.6  // size of pml
  d0 = 150[nm]
  n0 = 1
  k0 = 6
  d1 = 500[nm]
  n1 = 2
  k1 = 0
  d2 = 850[nm]
  n2 = 1.5
  k2 = 0
  rSphere = 120[nm]
  nSphere = 3  // sphere refractive index 1
  kSphere = 0
  hCyl = 200[nm]  // height of cylinder
  rCyl = 100[nm]  // radius of cylinder
  nCyl = 3  // refractive index cylinder
  kCyl = 0
  aProlate = 80[nm]  // transverse half axis of first spheroid
  cProlate = 150[nm]  // vertical half axis of first spheroid
  nProlate = 3  // refractive index first spheroid
  kProlate = 0
  aOblate = 150[nm]  // transverse half axis of second spheroid
  cOblate = 80[nm]  // vertical half axis of second spheroid
  nOblate = 3  // refractive index second spheroid
  kOblate = 0
  xSphere = 300[nm]
  ySphere = 300[nm]
  zSphere = 250 [nm]
  xCyl = 300[nm]
  yCyl = -300[nm]
  zCyl = 250[nm]
  xProlate = -300[nm]
  yProlate = 300[nm]
  zProlate = 250[nm]
  xOblate = -300[nm]
  yOblate = -300[nm]
  zOblate = 250[nm]

Selections
  sel1: Explicit "pt1" on no points

Coordinate systems
  pml1: PML "Perfectly Matched Layer 1" on domains 1-6 | ScalingType = Spherical; r0 = {0, 0, -d0}; raxis = {0, 0, 1}

Geometry
  geom1 "Geometry 1" (3D, length unit m)
    sph1: Sphere "Outer Sphere" | pos = {0, 0, 250[nm]}; r = wlay / 2
    blk1: Block "Cut Block" | pos = {-wlay / 2, -wlay / 2, -d0}; size = {wlay, wlay, wlay}
    int1: Intersection | input = blk1, sph1
    sph2: Sphere "Inner Sphere" | pos = {0, 0, 250[nm]}; r = wlay / 2 - dpml
    blk2: Block "Cut Block 1" | pos = {-wlay / 2, -wlay / 2, -d0}; size = {wlay, wlay, wlay}
    int2: Intersection | input = blk2, sph2
    wp2: WorkPlane "Interface 1" | unite = on
    pard1: PartitionDomains | domain = int1(1) domains 1; int2(1) domains 1
    wp3: WorkPlane "Interface 2" | quickz = d1; unite = on
    pard2: PartitionDomains | domain = pard1(1) domains 1; pard1(2) domains 1; workplane = wp3
    wp1: WorkPlane | quickplane = xz; unite = on
    par1: Partition "Partition Objects 1" | input = pard2; partitionwith = workplane; workplane = wp1
    pt1: Point | p = {-200[nm], 0, 250[nm]}; contributeto = csel1
    pt2: Point | contributeto = csel2; p = {200[nm], 0, 250[nm]}
    pt3: Point | contributeto = csel3; p = {0, 200[nm], 250[nm]}
    pt4: Point | contributeto = csel4; p = {0, -200[nm], 250[nm]}
    sphere50: Sphere | pos = {xSphere, ySphere, zSphere}; r = rSphere
    cyl4: Cylinder | pos = {xCyl, yCyl, zCyl - hCyl/2}; r = rCyl; h = hCyl
    elp1: Ellipsoid | pos = {xProlate, yProlate, zProlate}; semiaxes = {aProlate, aProlate, cProlate}
    elp2: Ellipsoid | pos = {xOblate, yOblate, zOblate}; semiaxes = {aOblate, aOblate, cOblate}
    pt5: Point | p = {0, 0, 250[nm]}
    sph3: Sphere "Dipole Sphere 5" | pos = {0, 0, 250[nm]}; r = d1/5
    fin: Finalize "Form Union"

Materials
  mat6: Common "cylinder material" on domains 18
    RefractiveIndex
      n = nCyl
      ki = kCyl
  mat8: Common "prolate material" on domains 14
    RefractiveIndex
      n = nProlate
      ki = kProlate
  mat9: Common "oblate material" on domains 13
    RefractiveIndex
      n = nOblate
      ki = kOblate
  mat4: Common "sphere material" on domains 17
    RefractiveIndex
      n = nSphere
      ki = kSphere
  mat1: Common "bottom layer material" on domains 3, 4, 9, 10
    RefractiveIndex
      n = n0
      ki = k0
  mat2: Common "top layer material" on domains 5, 6, 11, 12
    RefractiveIndex
      n = n2
      ki = k2
  mat7: Common "middle layer material" on domains 1, 2, 7, 8, 15, 16
    RefractiveIndex
      n = n1
      ki = k1

Physics
  emw: ElectromagneticWaves "Electromagnetic Waves, Frequency Domain" on all domains
    dependent variable E = {Ex, Ey, Ez}
    wee1: WaveEquationElectric (default) | DisplacementFieldModel = RefractiveIndex; materialType = from_mat
    pec1: PerfectElectricConductor (default)
    init1: init "Initial Values 1" (default)
    epd1: ElectricPointDipole (disabled) on selection geom1_pt1_pnt | DipoleSpecification = DipoleMoment; pI = {1, 0, 0}
    epd2: ElectricPointDipole (disabled) on points 52 | DipoleSpecification = DipoleMoment; pI = {0, 1, 0}
    epd3: ElectricPointDipole (disabled) on points 39 | DipoleSpecification = DipoleMoment; pI = {0, 0, 1}
    epd4: ElectricPointDipole (disabled) on points 31 | DipoleSpecification = DipoleMoment; pI = {0, 0, 1}
    epd5: ElectricPointDipole on points 34 | DipoleSpecification = DipoleMoment; pI = {1, 0, 0}

Mesh
  mesh1 "Mesh 1"
    size: MeshSizeDefault | hmax = 5E-8; hmin = 1E-8; hauto = 4; custom = on
    ftet2: FreeTet "Particle Mesh" on domains 13-18
      size1: Size on domains 13-18 | hmax = wl/8; hauto = 5; custom = on
    ftet3: FreeTet "Layers Mesh" on domains 1-12
      size1: Size on domains 1-12 | hmax = wl/8; hgrad = 1.2; hauto = 5; custom = on
    swe1: Sweep "Swept 1" (disabled) on domains 1-6
      sourceface = boundaries 61, 63, 68, 72
      targetface = boundaries 57, 59, 69, 75
      prob1: MeshProblem "Problems 1"
        error: MeshErrorSel on domains 1, 3, 4
          error_a: MeshErrorSel "Error" on boundaries 16, 17, 33, 34

Studies
  std1 "Study 1"
    freq: Frequency "Frequency Domain" | plist = f; punit = Hz

Solver configurations
  sol1 "Solver 1" (study std1)
    v1: Variables "Dependent Variables 1"
    s1: Stationary "Stationary Solver 1"
      p1: Parametric | pname = freq; plistarr = f
      fc1: FullyCoupled | linsolver = i1
      i1: Iterative | linsolver = bicgstab
        mg1: Multigrid

Datasets
  dset1: Solution | solution = sol1
  cln1: CutLine3D "line for comparison to smuthi"
    data = dset1
    genpoints = {{-600[nm], 0, 600[nm]}, {600[nm], 0, 600[nm]}}
  cpl1: CutPlane "plane for comparison to smuthi"
    data = dset1
    quickplane = xy
    quickz = 750[nm]
    genpoints = {{0, 0, 0}, {1, 0, 0}, {0, 1, 0}}
  cln2: CutLine3D "line for comparison to smuthi 2"
    data = dset1
    genpoints = {{-1500[nm], 0, 750[nm]}, {1500[nm], 0, 750[nm]}}

Plots
  pg1: PlotGroup3D "Electric field" | data = dset1
    mslc1: Multislice | expr = emw.Ez
  pg2: PlotGroup3D "3D Plot Group 2" | data = dset1
    mslc1: Multislice | expr = emw.normE; unit = V/m; xnumber = 0; ynumber = 0
  pg3: PlotGroup1D "Ex" | data = cln1
    lngr1: LineGraph | data = cln1; expr = real(emw.Ex); xdata = expr; xdataexpr = x
    lngr3: LineGraph | data = cln1; expr = imag(emw.Ex); xdata = expr; xdataexpr = x
  pg4: PlotGroup1D "Ey" | data = cln1
    lngr1: LineGraph | data = cln1; expr = emw.Ey; xdata = expr; xdataexpr = x
    lngr2: LineGraph | data = cln1; expr = imag(emw.Ey); xdata = expr; xdataexpr = x
  pg5: PlotGroup1D "Ez" | data = cln1
    lngr1: LineGraph | data = cln1; expr = emw.Ez; xdata = expr; xdataexpr = x
    lngr2: LineGraph | data = cln1; expr = imag(emw.Ez); xdata = expr; xdataexpr = x
  pg6: PlotGroup2D "2D Plot Group 6" | data = cpl1
    surf1: Surface | expr = imag(emw.Ez)

Exports
  data2: Data
    data = cln2
    expr = {real(emw.Ex), imag(emw.Ex), real(emw.Ey), imag(emw.Ey), real(emw.Ez), imag(emw.Ez)}
    unit = {V/m, V/m, V/m, V/m, V/m, V/m}
    filename = /home/egel_local/dissertation/data/smuthi_validation/comsol_data_high_n_along_line.txt
  data3: Data
    data = cpl1
    expr = {real(emw.Ey), imag(emw.Ey)}
    filename = /home/egel_local/dissertation/data/smuthi_validation/comsol_data_high_n_along_plane_xy.txt